# Parâmetros do projeto:
Vin_min := 14*V  # Tensão mínima de entrada CC
# Fixando o fluxo em 0,3:
# Com 10A e 23 espiras - 165uH.
# Com 15A e 23 espiras - 110uH.
# Com 20A e 23 espiras - 83uH.
# Com 25A e 23 espiras - 66uH.
# Com 30A e 23 espiras - 55uH.
Vin_nom := 17*V  # Tensão nominal de entrada CC
Vin_max := 30*V  # Tensão máxima de entrada CC
Vo := 12*V  # Tensão de saída
Io_min := 1*A  # Corrente mínima de saída
# Fixando em 100uH:
# Com 10A e 23 espiras - B = 0,181.
# Com 15A e 23 espiras - B = 0,272.
# Com 20A e 23 espiras - B = 0,362.
# Com 25A e 23 espiras - B = 0,453.
# Com 30A e 23 espiras - B = 0,543.
Io_max := 10  # Corrente máxima de saída
V_ripple_max := 1 %*Vo = 0.12 V  # Ripple da tensão de saída
fs := 60000*Hz  # Frequência de comutação da chave
# Constantes utilizadas:
kp := 0.5
kw := 0.4
J := 350
Bmax := 0.3
η := 0.9
# Projeto do indutor de saída:
L := 0.000100
AeAw := L*Io_max*Io_max*10^4/(kw*J*Bmax) = 2.38095  # cm^4
# Núcleo Thornton NEE 42/21/20
Aw := 2.5604
Ae := 2.40
Ae*Aw = 6.14496
massa_nucleo := 112*g
# Núcleo Thornton NEE 55/28/21 IP12R
Aw := 3.7555
Ae := 3.54
Ae*Aw = 13.2945
massa_nucleo := 218*g
# Núcleo Thornton NEE 65/33/13 IP12R
Aw := 5.478
Ae := 2.66
Ae*Aw = 14.5715
massa_nucleo := 195.4*g
# Núcleo Thornton NEE 55/28/25 IP12E
Aw := 3.7555
Ae := 4.1866
Ae*Aw = 15.7228
massa_nucleo := 262*g
# Núcleo Thornton NEE 42/21/20
Aw := 2.5604
Ae := 2.40
Ae*Aw = 6.14496
N := 23
massa_nucleo := 112*g
B := L*Io_max*10^4/(N*Ae) = 0.181159
# Número de espiras:
Nf := L*Io_max*10^4/(Bmax*Ae) = 13.8889
Nf := 23
# Entreferro:
e := Nf^2*4*π*10^-7*Ae/L*10^-2 = 0.159543  # cm
# Diâmetro máximo devido ao efeito skin@80°C:
Δ := 6.6*cm/sqrt(fs/Hz)
Δ = 0.0269444 cm
# Diâmetro máximo do condutor:
Da_max := 2*Δ
Da_max = 0.0538888 cm  # Fio 24AWG - 0.051cm
# Não será considerado devido a pequena variação de corrente no indutor.
# 33AWG
Scu_33AWG := 0.000254 cm^2
Scuisol_33AWG := 0.000371 cm^2
Dcu_33AWG := sqrt(4*Scu_33AWG/π)
Dcu_33AWG = 0.0179834 cm
# Resistência CC por cm:
Rcc_33AWG := 0.009070*Ω/cm
# 32AWG
Scu_32AWG := 0.000320 cm^2
Scuisol_32AWG := 0.000459 cm^2
Dcu_32AWG := sqrt(4*Scu_32AWG/π)
Dcu_32AWG = 0.0201851 cm
# Resistência CC por cm:
Rcc_32AWG := 0.007192*Ω/cm
# 31AWG
Scu_31AWG := 0.000404 cm^2
Scuisol_31AWG := 0.000568 cm^2
Dcu_31AWG := sqrt(4*Scu_31AWG/π)
Dcu_31AWG = 0.0226801 cm
# Resistência CC por cm:
Rcc_31AWG := 0.005704*Ω/cm
# 30AWG
Scu_30AWG := 0.000509 cm^2
Scuisol_30AWG := 0.000704 cm^2
Dcu_30AWG := sqrt(4*Scu_30AWG/π)
Dcu_30AWG = 0.0254574 cm
# Resistência CC por cm:
Rcc_30AWG := 0.004523*Ω/cm
# 29AWG
Scu_29AWG := 0.000642 cm^2
Scuisol_29AWG := 0.000872 cm^2
Dcu_29AWG := sqrt(4*Scu_29AWG/π)
Dcu_29AWG = 0.0285906 cm
# Resistência CC por cm:
Rcc_29AWG := 0.003587*Ω/cm
# 28AWG
Scu_28AWG := 0.000810 cm^2
Scuisol_28AWG := 0.001083 cm^2
Dcu_28AWG := sqrt(4*Scu_28AWG/π)
Dcu_28AWG = 0.0321142 cm
# Resistência CC por cm:
Rcc_28AWG := 0.002845*Ω/cm
# 27AWG
Scu_27AWG := 0.001021 cm^2
Scuisol_27AWG := 0.001344 cm^2
Dcu_27AWG := sqrt(4*Scu_27AWG/π)
Dcu_27AWG = 0.0360552 cm
# Resistência CC por cm:
Rcc_27AWG := 0.002256*Ω/cm
# 26AWG
Scu_26AWG := 0.001287 cm^2
Scuisol_26AWG := 0.0016713 cm^2
Dcu_26AWG := sqrt(4*Scu_26AWG/π)
Dcu_26AWG = 0.0404804 cm
# Resistência CC por cm:
Rcc_26AWG := 0.001789*Ω/cm
# 25AWG
Scu_25AWG := 0.001624 cm^2
Scuisol_25AWG := 0.002078 cm^2
Dcu_25AWG := sqrt(4*Scu_25AWG/π)
Dcu_25AWG = 0.0454724 cm
# Resistência CC por cm:
Rcc_25AWG := 0.001419*Ω/cm
# 24AWG
Scu_24AWG := 0.002047 cm^2
Scuisol_24AWG := 0.002586 cm^2
Dcu_24AWG := sqrt(4*Scu_24AWG/π)
Dcu_24AWG = 0.0510521 cm
# Resistência CC por cm:
Rcc_24AWG := 0.001125*Ω/cm
# 23AWG
Scu_23AWG := 0.002582 cm^2
Scuisol_23AWG := 0.003221 cm^2
Dcu_23AWG := sqrt(4*Scu_23AWG/π)
Dcu_23AWG = 0.0573368 cm
# Resistência CC por cm:
Rcc_23AWG := 0.000892*Ω/cm
# 22AWG
Scu_22AWG := 0.003255 cm^2
Scuisol_22AWG := 0.004013 cm^2
Dcu_22AWG := sqrt(4*Scu_22AWG/π)
Dcu_22AWG = 0.064377 cm
# Resistência CC por cm:
Rcc_22AWG := 0.000708*Ω/cm
# 21AWG
Scu_21AWG := 0.004105 cm^2
Scuisol_21AWG := 0.005004 cm^2
Dcu_21AWG := sqrt(4*Scu_21AWG/π)
Dcu_21AWG = 0.0722956 cm
# Resistência CC por cm:
Rcc_21AWG := 0.000561*Ω/cm
# 20AWG
Scu_20AWG := 0.005176 cm^2
Scuisol_20AWG := 0.006244 cm^2
Dcu_20AWG := sqrt(4*Scu_20AWG/π)
Dcu_20AWG = 0.0811806 cm
# Resistência CC por cm:
Rcc_20AWG := 0.000445*Ω/cm
# 19AWG
Scu_19AWG := 0.006257 cm^2
Scuisol_19AWG := 0.007794 cm^2
Dcu_19AWG := sqrt(4*Scu_19AWG/π)
Dcu_19AWG = 0.0892561 cm
# Resistência CC por cm:
Rcc_19AWG := 0.000353*Ω/cm
# 14AWG
Scu_14AWG := 0.021 cm^2
Scuisol_14AWG := 0.021 cm^2
Dcu_19AWG := sqrt(4*Scu_14AWG/π)
Dcu_19AWG = 0.163518 cm
# Resistência CC por cm:
Rcc_14AWG := 0.000083*Ω/cm
nfios_p := 2
J_p := Io_max*A/(Scu_14AWG*nfios_p)
J_p = 238.095 A/cm^2
Aw := 0.00025604*m^2
Pe := (Scuisol_14AWG*Nf*nfios_p)/(Aw*kw)
Pe = 0.943212
# Perdas no cobre:
MLT := 29.5*4*mm = 0.118 m  # Fio 14AWG
ρ := 0.000083*Ω/cm
Lfiof := MLT*Nf = 2.714 m
Rcobref := ρ*Lfiof/nfios_p = 0.0112631 Ω
Pcobre := Rcobref*(Io_max*A)^2 = 1.12631 W
# Perdas no Núcleo:
ΔIlf := 0.47678
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ΔB := ΔIlf*L*10^4/(Nf*Ae) = 0.00863732
# ΔB equivalente a 94,6 Gauss
# Vamos usar a curva de 500 Gauss
Pp := 3*mW/g
Pnucleo := Pp*massa_nucleo = 0.336 W
# Elevação de temperatura:
Rtn := 23*(Ae*Aw)^-0.37*K/W
ΔT := (Pcobre + Pnucleo)*Rtn = 518.818 K/m^(37/50)
